// COMSOL Multiphysics 6.4.0.429 model "Untitled.mph"
// Outline of the model tree

Parameters
  R_d = 10[mm]  // 主管半径
  L_d = 500[mm]  // 主管长度
  r_n = 4[mm]  // 共振器颈口半径
  l_n = 20[mm]  // 颈长
  R_c = 22.5[mm]  // 共振腔半径
  h_c = 32[mm]  // 共振腔高度
  rho_air = 1.2[kg/m^3]  // 空气密度
  c_air = 343[m/s]  // 空气声速
  S_n = pi*r_n^2  // 颈口截面积
  V_c = pi*R_c^2*h_c  // 腔体积
  l_e = l_n+0.85*2*r_n  // 颈有效长度（含末端修正）
  M_a = rho_air*l_e/S_n  // 声质量
  C_a = V_c/(rho_air*c_air^2)  // 声容
  f0 = 1/(2*pi*sqrt(M_a*C_a))  // 理论共振频率
  Z_d = rho_air*c_air/(pi*R_d^2)  // 主管特性声阻抗（声阻抗类）

Geometry
  geom1 "几何 1" (3D, length unit m)
    cyl1: Cylinder "主管" | r = R_d; h = L_d; axistype = x
    cyl2: Cylinder "共振器颈" | r = r_n; h = R_d+l_n+2[mm]; pos = {L_d/2, 0, 0}
    cyl3: Cylinder "共振腔" | r = R_c; h = h_c; pos = {L_d/2, 0, R_d+l_n}
    uni1: Union "并集 1" | input = cyl1(1), cyl2(1), cyl3(1); intbnd = off; face = all
    fin: Finalize "形成联合体"

Materials
  mat1: Common "Air" on domains 1
    def: def "Basic"
      thermalexpansioncoefficient = alpha_p(pA,T)
      molarmass = 0.02897[kg/mol]
      bulkviscosity = muB(T)
      relpermeability = 1
      relpermittivity = 1
      dynamicviscosity = eta(T)
      ratioofspecificheat = 1.4
      electricconductivity = 0[S/m]
      heatcapacity = Cp(T)
      density = rho(pA,T)
      thermalconductivity = k(T)
      soundspeed = cs(T)
      eta: Piecewise | arg = T; pieces = {200.0, 1600.0, -8.38278E-7+8.35717342E-8*T^1-7.69429583E-11*T^2+4.6437266E-14*T^3-1.06585607E-17*T^4}; argunit = K; fununit = Pa*s
      Cp: Piecewise | arg = T; pieces = {200.0, 1600.0, 1047.63657-0.372589265*T^1+9.45304214E-4*T^2-6.02409443E-7*T^3+1.2858961E-10*T^4}; argunit = K; fununit = J/(kg*K)
      rho: Analytic | expr = pA*0.02897/R_const[K*mol/J]/T; args = {pA, T}; fununit = kg/m^3; argunit = {Pa, K}
      k: Piecewise | arg = T; pieces = {200.0, 1600.0, -0.00227583562+1.15480022E-4*T^1-7.90252856E-8*T^2+4.11702505E-11*T^3-7.43864331E-15*T^4}; argunit = K; fununit = W/(m*K)
      cs: Analytic | expr = sqrt(1.4*R_const[K*mol/J]/0.02897*T); args = T; fununit = m/s; argunit = K
      an1: Analytic | funcname = alpha_p; expr = -1/rho(pA,T)*d(rho(pA,T),T); args = {pA, T}; fununit = 1/K; argunit = {Pa, K}
      an2: Analytic "Analytic 2a" | funcname = muB; expr = 0.6*eta(T); args = T; fununit = Pa*s; argunit = K
    RefractiveIndex: RefractiveIndex
      n = 1
      ki = 0
    NonlinearModel: NonlinearModel
      BA = def.gamma-1
    idealGas: idealGas
      Rs = R_const/Mn
      heatcapacity = Cp(T)
      ratioofspecificheat = 1.4
      molarmass = 0.02897[kg/mol]
      Cp: Piecewise | arg = T; pieces = {200.0, 1600.0, 1047.63657-0.372589265*T^1+9.45304214E-4*T^2-6.02409443E-7*T^3+1.2858961E-10*T^4}; argunit = K; fununit = J/(kg*K)

Physics
  acpr: PressureAcoustics "压力声学，频域" on all domains
    dependent variable p
    fpam1: FrequencyPressureAcousticsModel "压力声学 1" (default) | c_mat = from_mat
    shb1: SoundHard "硬声场边界（壁） 1" (default)
    init1: init "初始值 1" (default)
    port1: Port "激励端" on boundaries 1 | PortType = Circular; pamp = 1
      cpra1: CircularPortReferenceAxis "端口参考轴 1" on points 1-24
    port2: Port "接收端" on boundaries 16 | PortType = Circular
      cpra1: CircularPortReferenceAxis "端口参考轴 1" on all points

Mesh
  mesh1 "网格 1"
    size: MeshSizeDefault "大小" | hmax = 7[mm]; hmin = 1[mm]; hgrad = 1.3; hauto = 4; custom = on
    ftet1: FreeTet "自由四面体网格 1" on remaining entities

Studies
  std1 "研究 1"
    freq: Frequency "频域" | plist = range(100,2,800)

Solver configurations
  sol1 "解 1" (study std1)

Datasets
  dset1: Solution | solution = sol1